$PROB IOV DATA CENSORED AT LLOQ 0.5, M3: BLQ CENSORED (F_FLAG)   P:120base  F:BASE
$INPUT ID TIME AMT DV MDV EVID OCC POP BLQ
$DATA ../../data/iov-blq.csv IGNORE=@
$SUBR ADVAN2 TRANS2

$PK
  KA = THETA(1) * EXP(ETA(1))
  CL = THETA(2) * EXP(ETA(2))
  V  = THETA(3) * EXP(ETA(3))
  S2 = V

$ERROR
  LLOQ = 0.5
  IPRE = F
  W    = 1
  W    = SQRT(THETA(4)**2 + THETA(5)**2 * IPRE**2)
  IF (W.LT.1E-6) W = 1E-6
  IRES = DV - IPRE
  IWRE = IRES / W
  F_FLAG = 0
  Y    = IPRE + W * EPS(1)
  IF (BLQ.EQ.1) F_FLAG = 1
  IF (BLQ.EQ.1) Y = PHI((LLOQ - IPRE) / W)

$THETA
  (0, 1)       ; KA (1/h)
  (0, 3)       ; CL (L/h)
  (0, 50)      ; V  (L)
  (0, 0.05)    ; additive error SD (mg/L)
  (0, 0.1)     ; proportional error CV

$OMEGA
  0.1          ; KA
  0.1          ; CL
  0.05         ; V

$SIGMA 1 FIX

$EST MAX=9999 PRINT=5 METHOD=COND LAPLACE INTER NSIG=3 SIGL=9
     NOABORT NOTBT NOOBT NOSBT
$COV UNCOND PRINT=E
$TAB ID TIME AMT DV MDV EVID OCC BLQ KA CL V IPRE IWRE CWRES
     ONEHEADER NOPRINT FILE=sdtab
$TAB ID KA CL V ETA1 ETA2 ETA3
     ONEHEADER NOPRINT NOAPPEND FILE=patab
$TAB ID OCC
     ONEHEADER NOPRINT NOAPPEND FILE=cotab
$TAB ID POP
     ONEHEADER NOPRINT NOAPPEND FILE=catab
